*Heading
** Job name: T6 Model name: Model-1
** Generated by: Abaqus/CAE Student Edition 2016
*Preprint, echo=NO, model=NO, history=NO, contact=NO
**
** PARTS
**
*Part, name=Part-1
*Node
      1,         -35.,          80.
      2,         -45.,          80.
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*Element, type=CPS6M
 1,   1,   2,   5,  34,  35,  36
 2,   5,   4,   1,  37,  38,  36
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*Nset, nset=Set-1, generate
   1,  105,    1
*Elset, elset=Set-1, generate
  1,  40,   1
** Section: Section-1
*Solid Section, elset=Set-1, material=Material-1
10.,
*End Part
**
**
** ASSEMBLY
**
*Assembly, name=Assembly
**
*Instance, name=Part-1-1, part=Part-1
*End Instance
**
*Nset, nset=Set-1, instance=Part-1-1
  31,  32,  33, 101, 105
*Elset, elset=Set-1, instance=Part-1-1
 38, 40
*Nset, nset=Set-2, instance=Part-1-1
  1,  2,  3, 34, 39
*Elset, elset=Set-2, instance=Part-1-1
 1, 3
*Elset, elset=_Surf-1_S1, internal, instance=Part-1-1
 1, 3
*Surface, type=ELEMENT, name=Surf-1
_Surf-1_S1, S1
*End Assembly
**
** MATERIALS
**
*Material, name=Material-1
*Elastic
 2e+11, 0.3
** ----------------------------------------------------------------
**
** STEP: load
**
*Step, name=load, nlgeom=NO
*Static
1., 1., 1e-05, 1.
**
** BOUNDARY CONDITIONS
**
** Name: BC-1 Type: Symmetry/Antisymmetry/Encastre
*Boundary
Set-1, ENCASTRE
**
** LOADS
**
** Name: Load-1   Type: Pressure
*Dsload
Surf-1, P, 10.
**
** OUTPUT REQUESTS
**
*Restart, write, frequency=0
**
** FIELD OUTPUT: F-Output-1
**
*Output, field, variable=PRESELECT
**
** HISTORY OUTPUT: H-Output-1
**
*Output, history
*Node Output, nset=Set-2
U1, U2, U3, UR1, UR2, UR3
*Element Output, elset=Set-2
E11, E12, E13, E22, E23, E33, EE11, EE12, EE13, EE22, EE23, EE33, EEP, EP, INV3, PRESS
S11, S12, S13, S22, S23, S33, SP, TRESC
*Energy Output, elset=Set-2
ALLAE, ALLCD, ALLDMD, ALLEE, ALLFD, ALLIE, ALLJD, ALLKE, ALLKL, ALLPD, ALLQB, ALLSD, ALLSE, ALLVD, ALLWK, ETOTAL
*End Step
